*Heading
** Job name: Job-2 Model name: Faltwerk
** Generated by: Abaqus/CAE 6.14-1
*Preprint, echo=NO, model=NO, history=NO, contact=NO
**
** PARTS
**
*Part, name=Einheitszelle
*Node
      1,          -1.,          -1.,           0.
      2,          -1., -0.833333313,           0.
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*Element, type=S4R
  1,   3,   8,   9,   4
  2,   4,   9,  10,   5
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*Nset, nset=SET-NODE-FHG6
   1,   7,  13,  19,  25,  31
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*Elset, elset=SET-ELEM_UNTEN, generate
  1,  76,   1
*Elset, elset=SET-ELEM_OBEN, generate
  77,  152,    1
*Elset, elset=SET-ELEM_WAENDE, generate
 153,  200,    1
*End Part
**
**
** ASSEMBLY
**
*Assembly, name=Assembly
**
*Instance, name=Einheitszelle-1, part=Einheitszelle
*End Instance
**
*End Assembly
**
** MATERIALS
**
*Material, name=ElastoAlu
*Elastic
7000., 0.34
**
** BOUNDARY CONDITIONS
**
** Name: SKM1 Type: Displacement/Rotation
*Boundary
_PickedSet808, 1, 1
_PickedSet808, 2, 2
_PickedSet808, 3, 3
** Name: SKM2 Type: Displacement/Rotation
*Boundary
_PickedSet809, 2, 2
_PickedSet809, 3, 3
** Name: uz0-Rand Type: Displacement/Rotation
*Boundary
Set-1, 3, 3
** ----------------------------------------------------------------
**
** STEP: Last
**
*Step, name=Last, nlgeom=NO
*Static
1., 1., 1e-05, 1.
**
** LOADS
**
** Name: qz   Type: Pressure
*Dsload
Surf-1, P, 0.005
**
** OUTPUT REQUESTS
**
*Restart, write, frequency=0
**
** FIELD OUTPUT: F-Output-1
**
*Output, field, variable=PRESELECT
**
** HISTORY OUTPUT: H-Output-2
**
**
** HISTORY OUTPUT: H-Output-1
**
*Output, history, variable=PRESELECT
*End Step
