*Heading
** Job name: Job-1 Model name: Model-1
** Generated by: Abaqus/CAE 6.14-1
*Preprint, echo=NO, model=NO, history=NO, contact=NO
**
** PARTS
**
*Part, name=Part-1
*End Part
**
**
** ASSEMBLY
**
*Assembly, name=Assembly
**
*Instance, name=Part-1-1, part=Part-1
*Node
      1,   16.3722134,   28.4962845,           0.
      2,         31.5,         28.5,           0.
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*Element, type=S4R
  1,   1,  22, 325,  81
  2,  22,  23, 326, 325
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*Nset, nset=Set-vertikalLager
   1,   2,   3,   4,   5,   6
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*Elset, elset=Set-vertikalLager
    1,    2,    3,    4,    5,    6
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*Nset, nset=_PickedSet4, internal, generate
    1,  2338,     1
*Elset, elset=_PickedSet4, internal, generate
    1,  2209,     1
** Section: Section-1
*Shell Section, elset=_PickedSet4, material=Material-1
0.4, 5
*End Instance
**
*Nset, nset=_PickedSet5, internal, instance=Part-1-1
 6,
*Nset, nset=_PickedSet6, internal, instance=Part-1-1
 3,
*Elset, elset=__PickedSurf4_SNEG, internal, instance=Part-1-1, generate
    1,  2209,     1
*Surface, type=ELEMENT, name=_PickedSurf4, internal
__PickedSurf4_SNEG, SNEG
*End Assembly
**
** MATERIALS
**
*Material, name=Material-1
*Elastic
 2.83e+07, 0.2
** ----------------------------------------------------------------
**
** STEP: Step-1
**
*Step, name=Step-1, nlgeom=NO
*Static
1., 1., 1e-05, 1.
**
** BOUNDARY CONDITIONS
**
** Name: BC-1 Type: Displacement/Rotation
*Boundary
Part-1-1.Set-vertikalLager, 3, 3
** Name: BC-HLager1 Type: Displacement/Rotation
*Boundary
_PickedSet5, 1, 1
_PickedSet5, 2, 2
** Name: BC-HLager2 Type: Displacement/Rotation
*Boundary
_PickedSet6, 2, 2
**
** LOADS
**
** Name: Load-1   Type: Pressure
*Dsload
_PickedSurf4, P, -18.525
**
** OUTPUT REQUESTS
**
*Restart, write, frequency=0
*Print, solve=NO
**
** FIELD OUTPUT: F-Output-1
**
*Output, field
*Node Output
CF, RF, U
*Element Output, directions=YES
LE, PE, PEEQ, PEMAG, S, SF
*Contact Output
CDISP, CSTRESS
**
** HISTORY OUTPUT: H-Output-1
**
*Output, history, variable=PRESELECT
*End Step
