*Heading
** Job name: Job-2 Model name: Model-1
** Generated by: Abaqus/CAE 6.14-1
*Preprint, echo=NO, model=NO, history=NO, contact=NO
**
** PARTS
**
*Part, name=Kasten
*Node
      1,           0.,         97.5,         400.
      2,          44.,         97.5,         400.
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*Element, type=S4R
  1,   1,  13, 459, 110
  2,  13,  14, 460, 459
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*Nset, nset=_PickedSet2, internal, generate
    1,  4592,     1
*Elset, elset=_PickedSet2, internal, generate
    1,  4440,     1
*Nset, nset=NODE_LAST
   1,   2,   5,   7,   9,  11
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*Nset, nset=NODE_BOUN
   3,   4,   6,   8,  10,  12
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** Section: Section-1
*Shell Section, elset=_PickedSet2, material=isotrop
5., 5
*End Part
**
**
** ASSEMBLY
**
*Assembly, name=Assembly
**
*Instance, name=Kasten-1, part=Kasten
*End Instance
**
*Nset, nset=_PickedSet6, internal, instance=Kasten-1
   1,   2,   5,   7,   9,  11
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*Elset, elset=_PickedSet6, internal, instance=Kasten-1
    1,    2,    3,    4,    5,    6
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*Nset, nset=_PickedSet8, internal, instance=Kasten-1
 4,
*Nset, nset=_PickedSet11, internal, instance=Kasten-1
   3,   4,   6,   8,  10,  12
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*Elset, elset=_PickedSet11, internal, instance=Kasten-1
  430,  431,  432,  433,  434,  435
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*Nset, nset=_PickedSet12, internal, instance=Kasten-1
 4,
*Nset, nset=_PickedSet13, internal, instance=Kasten-1
   1,   4,  11,  12,  72,  73
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*Elset, elset=_PickedSet13, internal, instance=Kasten-1
    1,   12,   23,   34,   45,   56
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*Nset, nset=_PickedSet14, internal, instance=Kasten-1
   3,   4,   6,   8,  10,  12
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*Elset, elset=_PickedSet14, internal, instance=Kasten-1
  430,  431,  432,  433,  434,  435
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*Surface, type=NODE, name=_PickedSet11_CNS_, internal
_PickedSet11, 1.
** Constraint: Constraint-1
*Coupling, constraint name=Constraint-1, ref node=_PickedSet12, surface=_PickedSet11_CNS_
*Kinematic
*End Assembly
**
** MATERIALS
**
*Material, name=isotrop
*Elastic
210000., 0.3
**
** BOUNDARY CONDITIONS
**
** Name: BC-1 Type: Displacement/Rotation
*Boundary
_PickedSet6, 1, 1
_PickedSet6, 2, 2
_PickedSet6, 3, 3
_PickedSet6, 4, 4
_PickedSet6, 5, 5
_PickedSet6, 6, 6
** Name: BC-2 Type: Symmetry/Antisymmetry/Encastre
*Boundary
_PickedSet13, XSYMM
** Name: BC-3 Type: Displacement/Rotation
*Boundary
_PickedSet14, 1, 1
_PickedSet14, 3, 3
_PickedSet14, 4, 4
_PickedSet14, 5, 5
_PickedSet14, 6, 6
** ----------------------------------------------------------------
**
** STEP: Step-1
**
*Step, name=Step-1, nlgeom=NO
druecken
*Static
1., 1., 1e-05, 1.
**
** LOADS
**
** Name: Load-1   Type: Concentrated force
*Cload
_PickedSet8, 2, -100000.
_PickedSet8, 3, 0.
**
** OUTPUT REQUESTS
**
*Restart, write, frequency=0
*Print, solve=NO
**
** FIELD OUTPUT: F-Output-1
**
*Output, field
*Node Output
CF, RF, U
*Element Output, directions=YES
1, 2, 3, 4, 5
LE, PE, PEEQ, PEMAG, PS, S, SF, TSHR, VE, VEEQ, VS
*Contact Output
CDISP, CSTRESS
**
** HISTORY OUTPUT: H-Output-1
**
*Output, history, variable=PRESELECT
*End Step
